# Worksheet setting: ORIGIN = 1
# меняем местами с1 и с2 | с3 - с1
A0 := [0.62, 0.92, 0.03; 0.99, 0.01, 0.07; 1.01, -0.02, 0.99]
A1 := [0.99, 0.01, 0.07; 0.62, 0.92, 0.03; 1.01, -0.02, 0.99]
A := [0.99, 0.01, 0.07; 0.62, 0.92, 0.03; 0.02, -0.03, 0.92]
b0 := [-0.82; 0.66; -0.98]
b1 := [0.66; -0.82; -0.98]
b := [0.66; -0.82; -1.64]
lsolve(A0, b0) = [0.811049; -1.37771; -1.84517]
lsolve(A, b) = [0.811049; -1.37771; -1.84517]
Gauss(A, b, n) :=
    for i ∈ 1 .. n
        for j ∈ 1 .. n
            A0[i, j] ← A[i, j]
        b0[i] ← b[i]
    for k ∈ 1 .. n - 1
        if A[k, k] == 0
            m ← k + 1
            while m ≤ n and A[m, k] == 0
                m ← m + 1
            return "система не обусловлена" if m > n
            for j ∈ 1 .. n
                R ← A[m, j]
                A[m, j] ← A[k, j]
                A[k, j] ← R
            R ← b[m]
            b[m] ← b[k]
            b[k] ← R
        for i ∈ k + 1 .. n
            q[i] ← A[i, k]/A[k, k]
            for j ∈ k .. n
                A[i, j] ← A[i, j] - q[i]*A[k, j]
            b[i] ← b[i] - q[i]*b[k]
    x[n] ← b[n]/A[n, n]
    for i ∈ n - 1, n - 2 .. 1
        s ← 0
        for j ∈ i + 1 .. n
            s ← s + A[i, j]*x[j]
        x[i] ← (b[i] - s)/A[i, i]
    for i ∈ 1 .. n
        s ← 0
        for j ∈ 1 .. n
            s ← s + A0[i, j]*x[j]
        δ[i] ← b0[i] - s
    return [x, A, δ]
Gauss_max(A, b, n) :=
    for i ∈ 1 .. n
        for j ∈ 1 .. n
            A0[i, j] ← A[i, j]
        b0[i] ← b[i]
    for k ∈ 1 .. n - 1
        max ← m
        m ← k + 1
        while m ≤ n
            m ← m + 1
        return "система не обусловлена" if m > n
        for j ∈ 1 .. n
            R ← A[m, j]
            A[m, j] ← A[k, j]
            A[k, j] ← R
        R ← b[m]
        b[m] ← b[k]
        b[k] ← R
        for i ∈ k + 1 .. n
            q[i] ← A[i, k]/A[k, k]
            for j ∈ k .. n
                A[i, j] ← A[i, j] - q[i]*A[k, j]
            b[i] ← b[i] - q[i]*b[k]
    x[n] ← b[n]/A[n, n]
    for i ∈ n - 1, n - 2 .. 1
        s ← 0
        for j ∈ i + 1 .. n
            s ← s + A[i, j]*x[j]
        x[i] ← (b[i] - s)/A[i, i]
    for i ∈ 1 .. n
        s ← 0
        for j ∈ 1 .. n
            s ← s + A0[i, j]*x[j]
        δ[i] ← b0[i] - s
    return [x, A, δ]
MI(A, B, n, ε, kmax) :=
    k ← 0
    for i ∈ 1 .. n
        X[i] ← 0
    δ ← 2*ε
    while k ≤ kmax and δ > ε
        k ← k + 1
        for i ∈ 1 .. n
            X0[i] ← X[i]
        for i ∈ 1 .. n
            S ← 0
            for j ∈ 1 .. n
                S ← S + (A[i, j]*X0[j]) if i ≠ j
            X[i] ← 1/A[i, i]*(B[i] - S)
            l[i] ← |X[i] - X0[i]|
        m ← l[1]
        for i ∈ 1 .. n
            m ← l[i] if l[i] > m
        δ ← m
        M[k, 1] ← k
        for i ∈ 1 .. n
            M[k, i + 1] ← X[i]
        M[k, n + 2] ← δ
    M
lsolve(A, b) = [0.811049; -1.37771; -1.84517]
MI(A, b, 3, 10^-5, 150) = [
    1, 0.666667, -0.891304, -1.78261, 1.78261;
    2, 0.801713, -1.28245, -1.82617, 0.391147;
    3, 0.808744, -1.37204, -1.84186, 0.089589;
    4, 0.810758, -1.37627, -1.84493, 0.00422648;
    5, 0.811018, -1.37752, -1.84511, 0.00125727;
    6, 0.811044, -1.37769, -1.84516, 0.000169336;
    7, 0.811049, -1.37771, -1.84516, 1.56911e-5;
    8, 0.811049, -1.37771, -1.84517, 3.1775e-6
]
Gauss(A, b, 3) = [[0.811049; -1.37771; -1.84517], [0.99, 0.01, 0.07; 0, 0.913737, -0.0138384; 0, 0, 0.918128], [0; 2.22045e-16; -2.22045e-16]]
A0 := [0, 0.92, 0.03; 0, 0.01, 0.07; 0, -0.02, 0.99]
lsolve(A0, b0) =  # error: Это вычисление не приближается к решению.
Gauss(A0, b0, 3) = "система не обусловлена"
MI(A0, b0, 3, 10^-5, 50) =  # error: Деление на ноль.
C := transpose(A)*A
d := transpose(A)*b
C = [1.3649, 0.5797, 0.1063; 0.5797, 0.8474, 0.0007; 0.1063, 0.0007, 0.8522]
d = [0.1122; -0.6986; -1.4872]
lsolve(C, d) = [0.811049; -1.37771; -1.84517]
lsolve(A, b) = [0.811049; -1.37771; -1.84517]
MI(C, d, 3, 10^-5, 150) = [
    1, 0.0822038, -0.824404, -1.74513, 1.74513;
    2, 0.568257, -0.879198, -1.75471, 0.486053;
    3, 0.592275, -1.2117, -1.81529, 0.332498;
    4, 0.738212, -1.22808, -1.81801, 0.145937;
    5, 0.745381, -1.32791, -1.8362, 0.0998319;
    6, 0.789198, -1.3328, -1.83702, 0.0438172;
    7, 0.791338, -1.36277, -1.84248, 0.0299744;
    8, 0.804494, -1.36423, -1.84272, 0.0131561;
    9, 0.805133, -1.37323, -1.84436, 0.00899977;
    10, 0.809083, -1.37367, -1.84443, 0.00395009;
    11, 0.809273, -1.37637, -1.84492, 0.00270217;
    12, 0.810459, -1.3765, -1.84495, 0.00118601;
    13, 0.810516, -1.37731, -1.84509, 0.000811322;
    14, 0.810872, -1.37735, -1.8451, 0.000356098;
    15, 0.810889, -1.37759, -1.84514, 0.000243599;
    16, 0.810996, -1.3776, -1.84515, 0.000106918;
    17, 0.811001, -1.37768, -1.84516, 7.31402e-5;
    18, 0.811033, -1.37768, -1.84516, 3.2102e-5;
    19, 0.811035, -1.3777, -1.84516, 2.19603e-5;
    20, 0.811044, -1.3777, -1.84516, 9.6386e-6
]
Gauss(C, d, 3) = [[0.811049; -1.37771; -1.84517], [1.3649, 0.5797, 0.1063; 0, 0.60119, -0.0444477; 0, 0, 0.840635], [-8.32667e-17; -2.22045e-16; -2.22045e-16]]
MI(A1, b1, 3, 10^-5, 50) = [
    1, 0.666667, -0.891304, -0.989899, 0.989899;
    2, 0.745663, -1.3083, -1.68804, 0.698141;
    3, 0.799238, -1.33877, -1.77706, 0.089016;
    4, 0.80584, -1.37197, -1.83233, 0.0552735;
    5, 0.810084, -1.37462, -1.83974, 0.00740598;
    6, 0.810634, -1.37724, -1.84412, 0.0043828;
    7, 0.81097, -1.37747, -1.84473, 0.000614403;
    8, 0.811016, -1.37767, -1.84508, 0.000347744;
    9, 0.811043, -1.37769, -1.84513, 5.08442e-5;
    10, 0.811047, -1.37771, -1.84516, 2.76077e-5;
    11, 0.811049, -1.37771, -1.84516, 4.19818e-6
]
