# Worksheet setting: ORIGIN = 1
# Лабораторная работа № 3
# «Методы решения нелинейных уравнений»
# Отделение корней
ε := 0.00001
f(x) := ((x - 2)^2 - 1)*2^x - 1
g(x) := 2*e^x - 5*x - 2
mpd(a, b, f, ε) :=
    return "Корней нет" if f(a)*f(b) > 0
    n ← 0
    while |b - a| > ε
        x ← (a + b)/2
        n ← n + 1
        break if f(x) == 0
        b ← x if f(a)*f(x) < 0
        a ← x otherwise
    [n; x; f(x)]
mpd1(a, b, f, ε) :=
    return "Корней нет" if f(a)*f(b) > 0
    n ← 0
    while |b - a| > ε
        x ← (a + b)/2
        n ← n + 1
        break if f(x) == 0
        b ← x if f(a)*f(x) < 0
        a ← x otherwise
        M[n, 1] ← n
        M[n, 2] ← x
        M[n, 3] ← f(x)
    M
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x := 1
root(f(x), x) = 0.734719
x := 3
root(f(x), x) = 3.05832
x := -6
root(g(x), x, 1, 2) = 1.61879
root(f(x), x) = -5.96409
# Классная работа
mpd(-0.5, 0.5, g, ε) = [1; 0; 0]
mpd(-6, -5, f, ε) = [17; -5.96409; 2.05668e-6]
mpd(1, 2, g, ε) = [17; 1.61878; -3.09802e-5]
mpd(0, 1, f, ε) = [17; 0.734718; 3.96144e-6]
mpd(3, 4, f, ε) = [17; 3.05833; 6.89767e-5]
P := mpd1(-6, -5, f, ε)
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mpd1(-6, -5, f, ε) = [
    1, -5.5, 0.220864;
    2, -5.75, 0.0974616;
    3, -5.875, 0.0396564;
    4, -5.9375, 0.011704;
    5, -5.96875, -0.00203797;
    6, -5.95312, 0.00481357;
    7, -5.96094, 0.00138295;
    8, -5.96484, -0.000328722;
    9, -5.96289, 0.000526811;
    10, -5.96387, 9.89687e-5;
    11, -5.96436, -0.000114896;
    12, -5.96411, -7.96826e-6;
    13, -5.96399, 4.5499e-5;
    14, -5.96405, 1.87651e-5;
    15, -5.96408, 5.39834e-6;
    16, -5.9641, -1.28498e-6;
    17, -5.96409, 2.05668e-6
]
mpd1(1, 2, g, ε) = [
    1, 1.5, -0.536622;
    2, 1.75, 0.759205;
    3, 1.625, 0.0318381;
    4, 1.5625, -0.271034;
    5, 1.59375, -0.124405;
    6, 1.60938, -0.0475041;
    7, 1.61719, -0.00814057;
    8, 1.62109, 0.0117716;
    9, 1.61914, 0.00179624;
    10, 1.61816, -0.00317697;
    11, 1.61865, -0.00069157;
    12, 1.6189, 0.000552034;
    13, 1.61877, -6.98431e-5;
    14, 1.61884, 0.000241077;
    15, 1.6188, 8.56121e-5;
    16, 1.61879, 7.88333e-6;
    17, 1.61878, -3.09802e-5
]
V := mpd1(0, 1, f, ε)
root(f(x), x, -6, -5) = -5.96409
V1 := mpd1(1, 2, g, ε)
root(g(x), x, 1, 2) = 1.61879
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mpd1(0, 1, f, ε) = [
    1, 0.5, 0.767767;
    2, 0.75, -0.0539915;
    3, 0.625, 0.373532;
    4, 0.6875, 0.163831;
    5, 0.71875, 0.0559193;
    6, 0.734375, 0.00121161;
    7, 0.742188, -0.0263283;
    8, 0.738281, -0.0125429;
    9, 0.736328, -0.00566178;
    10, 0.735352, -0.00222411;
    11, 0.734863, -0.000506008;
    12, 0.734619, 0.000352863;
    13, 0.734741, -7.65572e-5;
    14, 0.73468, 0.000138157;
    15, 0.734711, 3.08008e-5;
    16, 0.734726, -2.2878e-5;
    17, 0.734718, 3.96144e-6
]
H := mpd1(3, 4, f, ε)
root(f(x), x, 0, 1) = 0.734719
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mpd1(3, 4, f, ε) = [
    1, 3.5, 13.1421;
    2, 3.25, 4.35143;
    3, 3.125, 1.31733;
    4, 3.0625, 0.0769073;
    5, 3.03125, -0.481068;
    6, 3.04688, -0.207073;
    7, 3.05469, -0.066345;
    8, 3.05859, 0.00496377;
    9, 3.05664, -0.0307697;
    10, 3.05762, -0.0129228;
    11, 3.05811, -0.00398447;
    12, 3.05835, 0.000488415;
    13, 3.05823, -0.00174834;
    14, 3.05829, -0.000630038;
    15, 3.05832, -7.08311e-5;
    16, 3.05833, 0.000208787;
    17, 3.05833, 6.89767e-5
]
root(f(x), x, 3, 4) = 3.05832
# Метод секущих: | Метод хорд:
# Двухшаговый
nmax := 50
MH(a, b, f, ε, nmax) :=
    return "корней нет" if f(a)*f(b) > 0
    n ← 0
    x ← b
    while |f(x)| > ε and n ≤ nmax
        x ← a - f(a)*(b - a)/(f(b) - f(a))
        n ← n + 1
        break if f(x) == 0
        b ← x if f(a)*f(x) < 0
        a ← x otherwise
        M[n, 1] ← n
        M[n, 2] ← x
        M[n, 3] ← f(x)
    M
MS2(a, b, f, ε, nmax) :=
    n ← 0
    x0 ← a
    x1 ← b
    while |x1 - x0| > ε and n ≤ nmax
        x ← x1 - f(x1)*(x1 - x0)/(f(x1) - f(x0))
        n ← n + 1
        x0 ← x1
        x1 ← x
        M[n, 1] ← n
        M[n, 2] ← x
        M[n, 3] ← f(x)
    M
MH(0, 1, f, ε, nmax) = [
    1, 0.666667, 0.234645;
    2, 0.730017, 0.0165205;
    3, 0.734405, 0.00110716;
    4, 0.734698, 7.39449e-5;
    5, 0.734718, 4.93748e-6
]
MS2(0, 1, f, ε, nmax) = [
    1, 0.666667, 0.234645;
    2, 0.730017, 0.0165205;
    3, 0.734815, -0.000336155;
    4, 0.734719, 4.56903e-7;
    5, 0.734719, 1.25913e-11
]
root(f(x), x, 0, 1) = 0.734719
root(f(x), x, 0, 1) = 0.734719
MS2(1, 2, g, ε, nmax) = [
    1, 1.36011, -1.00731;
    2, 1.53039, -0.412011;
    3, 1.64824, 0.154425;
    4, 1.61611, -0.0136215;
    5, 1.61871, -0.000391544;
    6, 1.61879, 1.04209e-6;
    7, 1.61879, -7.93694e-11
]
MS2(3, 4, f, ε, nmax) = [
    1, 3.02083, -0.658295;
    2, 3.03436, -0.427345;
    3, 3.05938, 0.0194815;
    4, 3.05829, -0.000537026;
    5, 3.05832, -6.46581e-7;
    6, 3.05832, 2.1503e-11
]
root(f(x), x, 3, 4) = 3.05832
MH(3, 3.8, f, ε, nmax) = [
    1, 3.02564, -0.57704;
    2, 3.04016, -0.326055;
    3, 3.04827, -0.182044;
    4, 3.05278, -0.100958;
    5, 3.05527, -0.0557803;
    6, 3.05664, -0.0307555;
    7, 3.0574, -0.0169383;
    8, 3.05781, -0.00932273;
    9, 3.05804, -0.00512939;
    10, 3.05817, -0.00282167;
    11, 3.05824, -0.00155203;
    12, 3.05828, -0.000853631;
    13, 3.0583, -0.00046949;
    14, 3.05831, -0.000258211;
    15, 3.05832, -0.00014201;
    16, 3.05832, -7.81016e-5;
    17, 3.05832, -4.29537e-5;
    18, 3.05832, -2.36233e-5;
    19, 3.05832, -1.29921e-5;
    20, 3.05832, -7.14528e-6
]
MS2(-5, -6, f, ε, nmax) = [
    1, -5.9697, -0.00245197;
    2, -5.96406, 1.60503e-5;
    3, -5.96409, -1.63128e-8;
    4, -5.96409, -1.08358e-13
]
root(f(x), x, -5, -6) = -5.96409
root(f(x), x, 3, 4) = 3.05832
f(-5.96409313557) = 0
# Одношаговый
MH(-5, -6, f, ε, nmax) = [
    1, -5.9697, -0.00245197;
    2, -5.96496, -0.000381742;
    3, -5.96423, -5.9359e-5;
    4, -5.96411, -9.22826e-6
]
MS1(a, b, f, ε, nmax) :=
    n ← 0
    if d^2/da^2(f(a))*f(a) > 0
        c ← a
        x ← b
    otherwise
        c ← b
        x ← a
    while |f(x)| > ε and n < nmax
        x ← x - f(x)*(x - c)/(f(x) - f(c))
        n ← n + 1
        M[n, 1] ← n
        M[n, 2] ← x
        M[n, 3] ← f(x)
    M
MH(1, 2, g, ε, nmax) = [
    1, 1.36011, -1.00731;
    2, 1.53039, -0.412011;
    3, 1.59104, -0.137509;
    4, 1.61033, -0.0427484;
    5, 1.61623, -0.0129947;
    6, 1.61802, -0.00392317;
    7, 1.61856, -0.00118197;
    8, 1.61872, -0.000355882;
    9, 1.61877, -0.000107133;
    10, 1.61878, -3.2249e-5;
    11, 1.61879, -9.70736e-6
]
MS1(0, 1, f, ε, nmax) = [
    1, 0.666667, 0.234645;
    2, 0.730017, 0.0165205;
    3, 0.734405, 0.00110716;
    4, 0.734698, 7.39449e-5;
    5, 0.734718, 4.93748e-6
]
root(f(x), x, 0, 1) = 0.734719
MS1(1, 2, g, ε, nmax) = [
    1, 1.36011, -1.00731;
    2, 1.53039, -0.412011;
    3, 1.59104, -0.137509;
    4, 1.61033, -0.0427484;
    5, 1.61623, -0.0129947;
    6, 1.61802, -0.00392317;
    7, 1.61856, -0.00118197;
    8, 1.61872, -0.000355882;
    9, 1.61877, -0.000107133;
    10, 1.61878, -3.2249e-5;
    11, 1.61879, -9.70736e-6
]
MS1(3, 3.8, f, ε, nmax) = [
    1, 3.02564, -0.57704;
    2, 3.04016, -0.326055;
    3, 3.04827, -0.182044;
    4, 3.05278, -0.100958;
    5, 3.05527, -0.0557803;
    6, 3.05664, -0.0307555;
    7, 3.0574, -0.0169383;
    8, 3.05781, -0.00932273;
    9, 3.05804, -0.00512939;
    10, 3.05817, -0.00282167;
    11, 3.05824, -0.00155203;
    12, 3.05828, -0.000853631;
    13, 3.0583, -0.00046949;
    14, 3.05831, -0.000258211;
    15, 3.05832, -0.00014201;
    16, 3.05832, -7.81016e-5;
    17, 3.05832, -4.29537e-5;
    18, 3.05832, -2.36233e-5;
    19, 3.05832, -1.29921e-5;
    20, 3.05832, -7.14528e-6
]
root(g(x), x, 1, 2) = 1.61879
root(f(x), x, 3, 4) = 3.05832
MS1(-5, -6, f, ε, nmax) = [
    1, -5.9697, -0.00245197;
    2, -5.96496, -0.000381742;
    3, -5.96423, -5.9359e-5;
    4, -5.96411, -9.22826e-6
]
root(f(x), x, -5, -6) = -5.96409
