fun1(x) := sqrt(x)*e^(-x)
fun2(x) := 1/sqrt(1 + x^4)
a1 := 0.1
b1 := 1.1
x1 := a1, a1 + 0.01 .. b1
a2 := 0
b2 := 6
x2 := a2, a2 + 0.01 .. b2
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# Площадь криволинейной трапеции на отрезке
S1 := integral(fun1(x), x = a1 .. b1) = 0.394939
S2 := integral(fun2(x), x = a2 .. b2) = 1.68742
# Объем тела вращения
V1 := π*integral(fun1(x)^2, x = a1 .. b1) → 0.493156845097
V2 := π*integral(fun2(x)^2, x = a2 .. b2) → π*sqrt(2)*(ln(-(6*sqrt(2) + 37)/(6*sqrt(2) - 37)) + 2*atan(6*sqrt(2) - 1) + 2*atan(6*sqrt(2) + 1))/8 = 3.48459
f22(x) := d/dx(fun2(x)) → -2*x^3/(x^4 + 1)^(3/2)
f2(x) := d/dx(fun1(x)) → e^(-x)/(2*sqrt(x)) - sqrt(x)*e^(-x)
# Площадь поверхности
SPov1 := 2*π*integral(fun1(x)*sqrt(1 + f2(x)^2), x = a1 .. b1) = 2.57829
SPov2 := 2*π*integral(fun2(x)*sqrt(1 + f22(x)^2), x = a2 .. b2) = 11.3414
# Длина дуги
Ld1 := integral(sqrt(1 + f2(x)^2), x = a1 .. b1) = 1.04458
Ld2 := integral(sqrt(1 + f22(x)^2), x = a2 .. b2) = 6.19383
# 2. Метод прямоугольников
n := 10
MR(a, b, f, n, k) :=
    h ← (b - a)/n
    s ← 0
    a ← a + k*h
    for i ∈ 0 .. n - 1
        s ← s + f(a + i*h)
    s ← s*h
    s
# Процедура вычисления подинтегральной функции
# Сосчитаем интеграл методом:
S1 = 0.394939
S2 = 1.68742
# 1. Левых прямоугольников
MR(a2, b2, fun2, n, 0) = 1.97931
MR(a1, b1, fun1, n, 0) = 0.390693
# 2. Правых прямоугольников
MR(a2, b2, fun2, n, 1) = 1.39597
MR(a1, b1, fun1, n, 1) = 0.396992
# 3. Средних прямоугольников
MR(a2, b2, fun2, n, 1/2) = 1.68706
MR(a1, b1, fun1, n, 1/2) = 0.395481
# Вычислим погрешность для левых прямоугольников:
S1 = 0.394939
S2 = 1.68742
mRectangle1 := MR(a1, b1, fun1, n, 0) = 0.390693
mRectangle11 := MR(a2, b2, fun2, n, 0) = 1.97931
ΔMRectangle1 := |S1 - mRectangle1| = 0.00424572
ΔMRectangle11 := |S2 - mRectangle11| = 0.291888
δMRectangle1 := |S1 - mRectangle1|/|S1|*100 = 1.07503
δMRectangle11 := |S2 - mRectangle11|/|S2|*100 = 17.2979
# Вычислим погрешность для  правых прямоугольников:
mRectangle2 := MR(a1, b1, fun1, n, 1) = 0.396992
mRectangle22 := MR(a2, b2, fun2, n, 1) = 1.39597
ΔMRectangle22 := |S2 - mRectangle22| = 0.291452
ΔMRectangle2 := |S1 - mRectangle2| = 0.00205263
δMRectangle22 := |S2 - mRectangle22|/|S2|*100 = 17.272
δMRectangle2 := |S1 - mRectangle2|/|S1|*100 = 0.519733
# Вычислим погрешность для средних прямоугольников:
mRectangle33 := MR(a2, b2, fun2, n, 1/2) = 1.68706
mRectangle3 := MR(a1, b1, fun1, n, 1/2) = 0.395481
ΔMRectangle33 := |S2 - mRectangle33| = 0.000356044
ΔMRectangle3 := |S1 - mRectangle3| = 0.000542507
δMRectangle33 := |S2 - mRectangle33|/|S2|*100 = 0.0210999
δMRectangle3 := |S1 - mRectangle3|/|S1|*100 = 0.137365
# 3. Метод трапеций
xi := [1, 2, 3, 4, 5, 6, 7]
Trap(a, b, f, n) :=
    h ← (b - a)/n
    s ← 0
    t ← (f(a) + f(b))/2
    for i ∈ 1 .. n - 1
        s ← s + f(a + i*h)
    s ← h*(t + s)
    s  # вычисление шага
yi := [0, 2, 7, 11, 12, 6, 2]
# Подсчет приближенного значения интеграла
# 1) Сосчитаем интеграл методом трапеций:
Trap(a1, b1, fun1, n) = 0.393842
Trap(a2, b2, fun2, n) = 1.68764
S1 = 0.394939
S2 = 1.68742
# 2)Вычислим погрешность для метода трапеций:
Trap2 := Trap(a2, b2, fun2, n) = 1.68764
Trap1 := Trap(a1, b1, fun1, n) = 0.393842
ΔTrap2 := |S2 - Trap2| = 0.000218274
ΔTrap1 := |S1 - Trap1| = 0.00109654
δTrap2 := |S2 - Trap2|/|S2|*100 = 0.0129354
δTrap1 := |S1 - Trap1|/|S1|*100 = 0.277649
# 4.1.Метод Симпсона (первая формула)
MS(a, b, f, n) :=
    h ← (b - a)/n
    s ← 0
    t ← (f(b) - f(a))/2
    for i ∈ 0 .. n - 1
        w ← w + (f(a + i*h) + 2*f(a + i*h + h/2))
    s ← h/3*(t + w)
    s
S2 = 1.68742
S1 = 0.394939
# 1) Сосчитаем интеграл методом Симпсона:
MS(a1, b1, fun1, n) = 0.394935
MS(a2, b2, fun2, n) = 1.68726
# 2)Вычислим погрешность для метода Симпсона:
MS32 := MS(a2, b2, fun2, n) = 1.68726
MS1 := MS(a1, b1, fun1, n) = 0.394935
ΔMS32 := |S2 - MS32| = 0.000164605
ΔMS1 := |S1 - MS1| = 3.84342e-6
δMS32 := |S2 - MS32|/|S2|*100 = 0.0097548
δMS1 := |S1 - MS1|/|S1|*100 = 0.000973168
# 4.2. Метод Симпсона (вторая формула)
MS2(a, b, f, n) :=
    h ← (b - a)/n
    s ← 0
    q ← 0
    m ← n/2
    t ← f(a) + f(b)
    for i ∈ 1 .. m
        s ← s + 4*f(a + (2*i - 1)*h)
    for i ∈ 1 .. m - 1
        q ← q + 2*f(a + 2*i*h)
    s ← h/3*(t + s + q)
    s
# 1) Сосчитаем интеграл методом Симпсона:
MS2(a1, b1, fun1, n) = 0.394893
MS2(a2, b2, fun2, n) = 1.69993
S1 = 0.394939
S2 = 1.68742
# 2)Вычислим погрешность для метода Симпсона:
MS21 := MS2(a1, b1, fun1, 2*n) = 0.394935
MS22 := MS2(a2, b2, fun2, 2*n) = 1.68726
ΔMS21 := |S1 - MS21| = 3.84342e-6
ΔMS22 := |S2 - MS22| = 0.000164605
δMS2 := |S1 - MS21|/|S1|*100 = 0.000973168
δMS2 := |S2 - MS22|/|S2|*100 = 0.0097548
# 5. Визуализация поверхности вращения и криволинейной трапеции
m := 30
F1(u, v) := u
G1(u, v) := fun1(u)*cos(v)
H1(u, v) := fun1(u)*sin(v)
F2(u, v) := u
G2(u, v) := fun2(u)*cos(v)
H2(u, v) := fun2(u)*sin(v)
F1X := CreateMesh(F1, H1, G1, a1, b1, 0, 2*π, m)
F2X := CreateMesh(F2, H2, G2, a2, b2, 0, 2*π, m)
# [component: inputs F1X]
# [component: inputs F2X]
