# Worksheet setting: ORIGIN = 1
# Лабораторная работа №6
# Вариант 11
Gauss(a, b, n) :=
    for i ∈ 1, 2 .. n
        for j ∈ 1, 2 .. n
            a0[i, j] ← a[i, j]
        b0[i] ← b[i]
    for k ∈ 1, 2 .. (n - 1)
        if a[k, k] == 0
            m ← k + 1
            while m ≤ n and a[m, k] == 0
                m ← m + 1
            return "Не обусловлена" if m > n
            for j ∈ 1, 2 .. n
                R ← a[m, j]
                a[m, j] ← a[k, j]
                a[k, j] ← R
            R ← b[m]
            b[m] ← b[k]
            b[k] ← R
        for i ∈ k + 1, k + 2 .. n
            q[i] ← a[i, k]/a[k, k]
            for j ∈ k, k + 1 .. n
                a[i, j] ← a[i, j] - q[i]*a[k, j]
            b[i] ← b[i] - q[i]*b[k]
    x[n] ← b[n]/a[n, n]
    for i ∈ n - 1, n - 2 .. 1
        s ← 0
        for j ∈ i + 1, i + 2 .. n
            s ← s + a[i, j]*x[j]
        x[i] ← (b[i] - s)/a[i, i]
    for i ∈ 1, 2 .. n
        s ← 0
        for j ∈ 1, 2 .. n
            s ← s + a0[i, j]*x[j]
        δ[i] ← b0[i] - s
    [a; x; δ]
x := [4.08; 4.42; 2.52; 0.08; 2.14; 3.36; 7.35; 5]
y := [18.31; 21.85; 16.93; 8.23; 10.90; 17.18; 36.45; 24.11]
A1 := augment(x, y) = [4.08, 18.31; 4.42, 21.85; 2.52, 16.93; 0.08, 8.23; 2.14, 10.9; 3.36, 17.18; 7.35, 36.45; 5, 24.11]
A := csort(A1, 1) = [0.08, 8.23; 2.14, 10.9; 2.52, 16.93; 3.36, 17.18; 4.08, 18.31; 4.42, 21.85; 5, 24.11; 7.35, 36.45]
x := A[:, 1] = [0.08; 2.14; 2.52; 3.36; 4.08; 4.42; 5; 7.35]
y := A[:, 2] = [8.23; 10.9; 16.93; 17.18; 18.31; 21.85; 24.11; 36.45]
# Линейная регрессия
a1 := intercept(x, y) = 5.18037
a := line(x, y) = [5.18037; 3.8866]
a2 := slope(x, y) = 3.8866
# Организовываем линейную функцию
f(t) := a1 + a2*t
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n := 8
# Сумма квадратов разности
sum((y[i] - f(x[i]))^2, i = 1 .. n) = 34.4541
Mx := mean(x) = 3.61875
My := mean(y) = 19.245
# Коэффицент корреляции -1 <= r <= 1
r := sum((x[i] - Mx)*(y[i] - My), i = 1 .. n)/sqrt(sum((x[i] - Mx)^2*sum((y[i] - My)^2, i = 1 .. n), i = 1 .. n)) = 0.966818
# Пoказатель характеризующий тесноту линейной связи между x и y называется коэффициентом корреляции
corr(x, y) = 0.966818
# Полиномиальная регрессия
# возвращает вект коэф полинома к степени с помощью мнк по эксперементальным данным, x-массив обцис а у-ординат, элем массива x должны быть упоряд по возрастанию
c := regress(x, y, 2) = [3; 3; 2; 8.0402; 1.69815; 0.294526]
# вычисляет значение полиносма в точке t ,с- массив коэф найденных с помощью функции регресии
C(t) := interp(c, x, y, t)
# Меньше суммы квадратов
sum((y[i] - C(x[i]))^2, i = 1 .. n) = 14.8176
γ := sqrt(1 - sum((y[i] - C(x[i]))^2, i = 1 .. n)/sum((y[i] - My)^2, i = 1 .. n)) = 0.985866
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# Полином 3 стемени на графике не порабола а кубическая функция
d := regress(x, y, 3) = [3; 3; 3; 7.99788; 1.81374; 0.252244; 0.00378743]
D(t) := interp(d, x, y, t)
γ := sqrt(1 - sum((y[i] - D(x[i]))^2, i = 1 .. n)/sum((y[i] - My)^2, i = 1 .. n)) = 0.985876
sum((y[i] - D(x[i]))^2, i = 1 .. n) = 14.8081
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# Аппроксимация с помощью линейнной комбинации линейно-независимых функций .
linfit(x, y, F)
# Возвращает вектор, содержащий коэффициенты, используемые, чтобы создать линейную комбинацию функций из F, дающую наилучшую аппроксимацию данных из векторов x и y.
F(t) := [1; t; t^3; t^5; t^7]
k := linfit(x, y, F) = [7.8806; 2.41777; 0.0151099; 0.00109106; -1.60508e-5]
# Возвращает вектор коэф К который необходимо умножить на набор лин нез функций ,находящихся в вектор функции F
Z(t) := k*F(t)
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0.9858756771
γ := sqrt(1 - sum((y[i] - Z(x[i]))^2, i = 1 .. n)/sum((y[i] - My)^2, i = 1 .. n)) = 0.985872
sum((y[i] - Z(x[i]))^2, i = 1 .. n) = 14.8124
# Аппроксимация с помощью функции с нелинейной зависимостью от параметра
g := [1; 1; 0]
q := expfit(x, y, g) = [13.9079; 0.152198; -6.05652]
Q(t) := q[1]*e^(q[2]*t) + q[3]
sum((y[i] - Q(x[i]))^2, i = 1 .. n) = 14.8805
γ := sqrt(1 - sum((y[i] - Q(x[i]))^2, i = 1 .. n)/sum((y[i] - My)^2, i = 1 .. n)) = 0.985806
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w := sinfit(x, y, g) = [-2.04988; 4.76784; 19.6065]
W(t) := w[1]*sin(t + w[2]) + w[3]
γ := sqrt(1 - sum((y[i] - W(x[i]))^2, i = 1 .. n)/sum((y[i] - My)^2, i = 1 .. n)) = 0.163727
sum((y[i] - W(x[i]))^2, i = 1 .. n) = 513.781
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m := lgsfit(x, y, g) = [101.5; 11.6812; 0.255674]
M(t) := m[1]/(1 + m[2]*e^(-m[3]*t))
γ := sqrt(1 - sum((y[i] - M(x[i]))^2, i = 1 .. n)/sum((y[i] - My)^2, i = 1 .. n)) = 0.985868
sum((y[i] - M(x[i]))^2, i = 1 .. n) = 14.8166
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q3 := pwrfit(x, y, g)
q3 = [1.43509; 1.48928; 8.31567]
Q3(t) := q3[1]*t^q3[2] + q3[3]
sum((y[i] - Q3(x[i]))^2, i = 1 .. n) = 15.0521
γ := sqrt(1 - sum((y[i] - Q3(x[i]))^2, i = 1 .. n)/sum((y[i] - My)^2, i = 1 .. n)) = 0.985641
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# Наилучший вариант среди рассмотренных для аппроксимации исходной таблично заданной функцией
M(t) := m[1]/(1 + m[2]*e^(-m[3]*t))
K1 := [
    n, sum(x[i], i = 1 .. n), sum(x[i]^2, i = 1 .. n);
    sum(x[i], i = 1 .. n), sum(x[i]^2, i = 1 .. n), sum(x[i]^3, i = 1 .. n);
    sum(x[i]^2, i = 1 .. n), sum(x[i]^3, i = 1 .. n), sum(x[i]^4, i = 1 .. n)
]
K2 := [sum(y[i], i = 1 .. n); sum(y[i]*x[i], i = 1 .. n); sum(y[i]*x[i]^2, i = 1 .. n)]
γ := sqrt(1 - sum((y[i] - Z(x[i]))^2, i = 1 .. n)/sum((y[i] - My)^2, i = 1 .. n)) = 0.985872
sum((y[i] - Z(x[i]))^2, i = 1 .. n) = 14.8124
c = [3; 3; 2; 8.0402; 1.69815; 0.294526]
Gauss(K1, K2, 3) = [[8, 28.95, 137.431; 0, 32.6685, 242.741; 0, 0, 226.369]; [8.0402; 1.69815; 0.294526]; [0; 0; 0]]
intercept(x, y) = 5.18037
slope(x, y) = 3.8866
a := line(x, y)
f(t) := a[1] + a[2]*t
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# Интерполяция
x := [0.35; 0.41; 0.47; 0.51; 0.56; 0.64]
y := [2.73951; 2.3008; 1.96864; 1.78776; 1.59502; 1.34310]
p := pspline(x, y) = [0; 3; 1; 31.9697; 31.9697; 17.7349; 15.4711; 10.1801; 10.1801]
M := [
    n, sum(x[i], i = 1 .. n), sum(x[i]^2, i = 1 .. n), sum(x[i]^3, i = 1 .. n);
    sum(x[i], i = 1 .. n), sum(x[i]^2, i = 1 .. n), sum(x[i]^3, i = 1 .. n), sum(x[i]^4, i = 1 .. n);
    sum(x[i]^2, i = 1 .. n), sum(x[i]^3, i = 1 .. n), sum(x[i]^4, i = 1 .. n), sum(x[i]^5, i = 1 .. n);
    sum(x[i]^3, i = 1 .. n), sum(x[i]^4, i = 1 .. n), sum(x[i]^5, i = 1 .. n), sum(x[i]^6, i = 1 .. n)
]  # error: Индекс массива является недопустимым для этого массива.
fp(t) := interp(p, x, y, t)
Gauss(M, Y, 4) =  # error: Эта переменная не определена.
l := lspline(x, y) = [0; 3; 0; 0; 40.5925; 15.2135; 15.1438; 13.3754; 0]
fl(t) := interp(l, x, y, t)
z := cspline(x, y) = [0; 3; 2; 40.636; 29.5972; 18.5584; 14.912; 11.5341; 6.12933]
fz(t) := interp(z, x, y, t)
n := 6
L(x, y, t) :=
    L ← 0
    for i ∈ 1 .. n
        w ← 1
        for j ∈ 1 .. n
            w ← (t - x[j])/(x[i] - x[j])*w if i ≠ j
        L ← L + w*y[i]
    L
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