# Лабораторная работа №1
# Особенности технологии расчетов в системе компьютерной математики (MathCAD)
y(x) := x*ln(x)
# Исследование функции:
# 1) Область определения функции
# x > 0
# 2) Проверка на четность нечетность
y(-x) → -x*ln(-x)
# Функция общего вида
# 3) Точки пересечения графика с осями координат
y(x) solve → [0; 1]
# 4) Исследовать функцию на непрерывность. Найти точки разрыва первого и второго рода, найти пределы слева и справа в этих точках (если существуют конечные
# пределы слева и справа, то точка разрыва первого рода); найти вертикальные асимптоты
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# Функция непрерывна в ООФ
# Вертикальных асимптот нет
# 5) исследовать поведение функции на бесконечности найти горизонтальные асимптоты
limit(y(x), x → 0+) → 0
limit(y(x), x → ∞) → ∞
# Горизонтальных асимптот нет
# 6) найти наклонные асимптоты
k := limit(y(x)/x, x → ∞) → ∞  # так как коэф k равен ∞, то наклонных асимптот нет
b := limit(y(x) - k*x, x → ∞) → -∞
# 7) найти первую производную, найти интервалы возрастания и убывания функции, ее экстремумы
y1(x) := d/dx(y(x)) → ln(x) + 1
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y1(x) solve → e^-1  # точка минимума
y1(x) > 0 solve → e^-1 < x  # интервал возрастания функции
y1(x) < 0 solve → 0 < x < e^-1  # интервал убывания функции
# 8) найти вторую производную, найти интервалы выпуклости и вогнутости функции, её точки перегиба.
y2(x) := d/dx(y1(x)) → 1/x
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y2(x) solve →  # error: Решение не было найдено.  # Точки перегиба отсутствуют
y2(x) < 0 solve → x < 0
y2(x) > 0 solve → 0 < x  # интервал вогнутости
# Задание 2. Построить график параметрической функции
t := -7, -6.99 .. 7
x1(t) := t^3
x2(t) := t^2
y1(t) := t^2
y2(t) := t^3
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a := 7
b := 5
r(φ) := a/sqrt(cos(b*φ))
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